// COMSOL Multiphysics 5.5.0.359 model "mia_meshed model - Copy.mph"
// Outline of the model tree

Parameters
  H = 1[m]
  W = 2[m]
  X0 = 0
  Y0 = 0
  R = 0.4[m]
  DR = 0.1[m]
  DIF = 0.03[m]
  Tc = 100[k]  // Cold wall temp
  Th = 800[k]  // Hot wall temp
  rho_Al2O3 = 3970[kg/m^3]  // Density of Al2O3

Geometry
  geom1 "Geometry 1" (2D, length unit m)
    r1: Rectangle | pos = {X0, Y0}; size = {W, H}
    c1: Circle | pos = {W/2, H/2}; r = R
    c2: Circle | pos = {W/2, H/2}; r = R-DR
    uni1: Union | input = c1, r1
    dif1: Difference | input = uni1; input2 = c2
    pol2: Polygon | source = table; table = {{(W/2)-R, H/2}, {X0, H/2}}
    pol3: Polygon | source = table; table = {{(W/2)+R, H/2}, {W, H/2}}
    pol4: Polygon | source = table; table = {{(W/2), X0}, {(W/2), (H/2)-R}}
    pol5: Polygon | source = table; table = {{(W/2), H}, {(W/2), (H/2)+R}}
    pol6: Polygon | source = table; table = {{(W/2)-R, H/2}, {(W/2)-R+DR, H/2}}
    pol7: Polygon | source = table; table = {{(W/2)+R, H/2}, {(W/2)+R-DR, H/2}}
    pol8: Polygon | source = table; table = {{(W/2), (H/2)-R+DR}, {(W/2), (H/2)-R}}
    pol9: Polygon | source = table; table = {{(W/2), (H/2)+R-DR}, {(W/2), (H/2)+R}}
    pol10: Polygon | source = table; table = {{(W/2)-R-DIF, Y0}, {(W/2)-R-DIF, H}}
    pol11: Polygon | source = table; table = {{(W/2)+R+DIF, Y0}, {(W/2)+R+DIF, H}}
    pol12: Polygon | source = table; table = {{W/2+0.4, 0}, {W/2-0.4, 0}}
    fin: Finalize "Form Union"

Materials
  mat2: Common "Water, liquid" on no domains
    def "Basic"
      thermalexpansioncoefficient = alpha_p(T)
      bulkviscosity = muB(T)
      dynamicviscosity = eta(T)
      ratioofspecificheat = gamma_w(T)
      electricconductivity = 5.5e-6[S/m]
      heatcapacity = Cp(T)
      density = rho(T)
      thermalconductivity = k(T)
      soundspeed = cs(T)
      eta: Piecewise
        arg = T
        pieces = 
          {273.15, 413.15, 1.3799566804-0.021224019151*T^1+1.3604562827E-4*T^2-4.6454090319E-7*T^3+8.9042735735E-10*T^4-9.0790692686E-13*T^5+3.8457331488E-16*T^6}
          {413.15, 553.75, 0.00401235783-2.10746715E-5*T^1+3.85772275E-8*T^2-2.39730284E-11*T^3}
        argunit = K
        fununit = Pa*s
      Cp: Piecewise | arg = T; pieces = {273.15, 553.75, 12010.1471-80.4072879*T^1+0.309866854*T^2-5.38186884E-4*T^3+3.62536437E-7*T^4}; argunit = K; fununit = J/(kg*K)
      rho: Piecewise
        arg = T
        smooth = contd1
        pieces = 
          {273.15, 293.15, 6.3092789034e-05*T^3-0.0603676398829*T^2+18.9229382407066*T-950.704055329848}
          {293.15, 373.15, 1.0335053319e-05*T^3-0.0133950656345*T^2+4.96928883266*T+432.257114008512}
        argunit = K
        fununit = kg/m^3
      k: Piecewise | arg = T; pieces = {273.15, 553.75, -0.869083936+0.00894880345*T^1-1.58366345E-5*T^2+7.97543259E-9*T^3}; argunit = K; fununit = W/(m*K)
      cs: Interpolation | table = {{273, 1403}, {278, 1427}, {283, 1447}, {293, 1481}, {303, 1507}, {313, 1526}, {323, 1541}, {333, 1552}, {343, 1555}, {353, 1555}, {363, 1550}, {373, 1543}}; interp = piecewisecubic; argunit = K; fununit = m/s
      an1: Analytic | funcname = alpha_p; expr = -1/rho(T)*d(rho(T),T); args = T; argunit = K; fununit = 1/K
      an2: Analytic | funcname = gamma_w; expr = 1+(T/Cp(T))*(alpha_p(T)*cs(T))^2; args = T; argunit = K; fununit = 1
      an3: Analytic | funcname = muB; expr = 2.79*eta(T); args = T; argunit = K; fununit = Pa*s
  mat3: Common "94% Al2O3 [solid]" on domains 1-12
    def "Basic"
      thermalexpansioncoefficient = (alpha(T[1/K])[1/K]+(Tempref-293[K])*if(abs(T-Tempref)>1e-3,(alpha(T[1/K])[1/K]-alpha(Tempref[1/K])[1/K])/(T-Tempref),d(alpha(T[1/K])[1/K],T)))/(1+alpha(Tempref[1/K])[1/K]*(Tempref-293[K]))
      density = rho(T[1/K])[kg/m^3]
      dynamicviscosity = 0.8
      thermalconductivity = 40
      heatcapacity = 765
      ratioofspecificheat = 0.8
      relpermeability = 0.5
      alpha: Piecewise | arg = T; pieces = {293.0, 1473.0, 3.944437E-6+6.806282E-9*T^1-3.601049E-12*T^2+7.542153E-16*T^3}
      rho: Piecewise | arg = T; pieces = {293.0, 1473.0, 3756.162-0.04067051*T^1-5.069478E-5*T^2+1.338025E-8*T^3}
    ThermalExpansion
      dL = (dL(T[1/K])-dL(Tempref[1/K]))/(1+dL(Tempref[1/K]))
      dLIso = (dL(T[1/K])-dL(Tempref[1/K]))/(1+dL(Tempref[1/K]))
      dL: Piecewise | arg = T; pieces = {293.0, 1473.0, -0.00115572771+1.950247E-6*T^1+7.861281E-9*T^2-3.821941E-12*T^3+7.541879E-16*T^4}
    Enu "Young's modulus and Poisson's ratio"
      youngsmodulus = E(T[1/K])[Pa]
      poissonsratio = nu(T[1/K])
      E: Piecewise | arg = T; pieces = {293.0, 1473.0, 3.346408E11+2.964659E8*T^1-1784113.0*T^2+2895.083*T^3-1.84636*T^4+3.98036E-4*T^5}
      nu: Piecewise | arg = T; pieces = {293.0, 1473.0, 0.2900487-0.001001581*T^1+4.341511E-6*T^2-6.751663E-9*T^3+4.390585E-12*T^4-1.008932E-15*T^5}
    KG "Bulk modulus and shear modulus"
      K = kappa(T[1/K])[Pa]
      G = mu(T[1/K])[Pa]
      mu: Piecewise | arg = T; pieces = {293.0, 1473.0, 1.308812E11+2.086485E8*T^1-1116413.0*T^2+1797.865*T^3-1.164412*T^4+2.600012E-4*T^5}
      kappa: Piecewise | arg = T; pieces = {293.0, 1473.0, 7.393585E10+6.732083E8*T^1-1049898.0*T^2+638.1434*T^3-0.1296441*T^4}

Physics
  spf: LaminarFlow on all domains
    dependent variable u = {u, v, w}
    PhysicalModelProperty.pref = 0
    fp1: FluidProperties (default) | rho_mat = userdef; rho = rho_Al2O3; mu_mat = userdef; mu = 1e-3[Pa*s]
    init1: init "Initial Values 1" (default) | u_init = {7, 1, 0}; p_init = 1[atm]
    wallbc1: WallBC "Wall 1" (default)
    wallbc2: WallBC "Wall 2" on boundaries 1, 3, 27, 28
    wallbc3: WallBC "Wall 3" on boundaries 2, 5, 7, 10, 11, 14, 18, 20, 23, 26 | BoundaryCondition = Slip
    init2: init "Initial Values 2" on domains 1, 2 | u_init = {7, 1, 0}
  ht: HeatTransferInFluids on all domains
    dependent variable T
    fluid1: FluidHeatTransferModel "Fluid 1" (default)
    init1: init "Initial Values 1" (default)
    ins1: ThermalInsulation (default)
    ins2: ThermalInsulation on boundaries 1, 3, 27, 28
    temp1: TemperatureBoundary "Temperature 1" on boundaries 5, 10, 18, 26 | T0 = Tc
    temp2: TemperatureBoundary "Temperature 2" on boundaries 11, 14 | T0 = Th
  mfnc: MagnetostaticsNoCurrents "Magnetic Fields, No Currents" on all domains
    dependent variable Vm
    mfc1: MagneticFluxConservation (default)
    mi1: MagneticInsulation (default)
    init1: init "Initial Values 1" (default)
    mi2: MagneticInsulation on boundaries 1-3, 5, 7, 10, 11, 14, 18, 20, 23, 26
    init2: init "Initial Values 2" on no domains | Vm = 5
    mi3: MagneticInsulation on boundaries 1-3, 5, 7, 10, 11, 14, 18, 20, 23, 26

Mesh
  mesh1 "Mesh 1"
    size: MeshSizeDefault | hauto = 3
    ftri1: FreeTri "Free Triangular 1" on domains 2
    ftri2: FreeTri "Free Triangular 2" on domains 1
    ftri3: FreeTri "Free Triangular 3" on domains 12
    ftri4: FreeTri "Free Triangular 4" on domains 11
    ftri5: FreeTri "Free Triangular 5" on domains 4
    ftri6: FreeTri "Free Triangular 6" on domains 3
    ftri7: FreeTri "Free Triangular 7" on domains 10
    ftri8: FreeTri "Free Triangular 8" on domains 7
    ftri9: FreeTri "Free Triangular 9" on domains 5 | smoothmaxiter = 800
      size1: Size on domains 5 | hauto = 2
    ftri11: FreeTri "Free Triangular 11" on domains 6 | smoothmaxiter = 800
      size1: Size on domains 6 | hauto = 2
    ftri12: FreeTri "Free Triangular 12" on domains 8 | smoothmaxiter = 800
      size1: Size on domains 8 | hauto = 2
    ftri13: FreeTri "Free Triangular 13" on domains 9 | smoothmaxiter = 800
      size1: Size on domains 9, 12 | hauto = 2
    ftri10: FreeTri "Free Triangular 10" on no domains

Studies
  std1 "Study 1"
    stat: Stationary

Solver configurations
  sol1 "Solution 1" (study std1)
    v1: Variables "Dependent Variables 1"
    s1: Stationary "Stationary Solver 1"
      fc1: FullyCoupled | linsolver = d1; initstep = 0.01; minstep = 1.0E-6; maxiter = 100
      d1: Direct "Direct, Heat Transfer Variables (ht) (merged) (merged)" | pivotperturb = 1.0E-13

Datasets
  dset1: Solution | solution = sol1

Plots
  pg1: PlotGroup2D "Velocity (spf)" | data = dset1
    surf1: Surface | expr = spf.U
  pg2: PlotGroup2D "Pressure (spf)" | data = dset1
    con1: Contour | expr = p; levelrounding = off
  pg3: PlotGroup2D "Temperature (ht)" | data = dset1
    surf1: Surface | expr = T
  pg4: PlotGroup2D "Isothermal Contours (ht)" | data = dset1
    con1: Contour | expr = T; levelrounding = off
  pg5: PlotGroup2D "Magnetic Flux Density Norm (mfnc)" | data = dset1
    surf1: Surface | expr = mfnc.normB